OpenVSP model (file version 5), 2 components.
Geometry view with OpenVSP parameter names; values to 6 digits, angles in degrees, lengths in the model's unit.
Overall bounding box: X_Min=-0.052 X_Len=0.104 Y_Min=0 Y_Len=0.958 Z_Min=-0.00504926 Z_Len=0.0100985

Propeller "PropGeom"
  location (X Y Z) 0 0 0, rotation 0 90 0
  bounding box size 0.104 0.783644 0.0100985
  mass: Density=4500 Shell_Flag=0 Mass_Area=1 Mass_Prior=0
  Design: Diameter=1.916 NumBlade=1 Beta34=0 UseBeta34Flag=1 Feather=0 Rotate=0 Precone=0 ReverseFlag=0 FoldAngle=0 PropMode=0 AF=84.3746 CLi=0 Chord=0.108559 Solidity=0.0345556 ConstructXoC=0.5 FeatherAxisXoC=0.5 FeatherOffsetXoC=0
  cross sections:
    n  RadiusFrac  shape
    0  0.182       airfoil file "BELL 540 AIRFOIL (MODIFIED NACA 0012)"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 BaseThickChord=0.0971026 Chord=0.104 ThickChord=0.0971
    1  1           as above
  Chord along r/R (linear): 0.182: 0.108559, 1: 0.108559
  Thick along r/R (linear): 0.182: 0.0971, 1: 0.0971

Mesh "MeshGeom"
  location (X Y Z) 0 0 0, rotation 0 0 0
